*Heading
** Job name: NH Model name: NH
** Generated by: Abaqus/CAE 2018
*Preprint, echo=NO, model=NO, history=NO, contact=NO
**
** PARTS
**
*Part, name=NH
*Node
      1, -0.0500000007,           0., 0.0164589807
      2, -0.0350000001,           0., 0.0500000007
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*Element, type=C3D4
   1,  773,  774,  775,  776
   2,  777,  778,  779,  773
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*Nset, nset=_PickedSet12, internal, generate
    1,  1695,     1
*Elset, elset=_PickedSet12, internal, generate
    1,  7726,     1
** Section: Section-1
*Solid Section, elset=_PickedSet12, material=NH
,
*End Part
**
**
** ASSEMBLY
**
*Assembly, name=Assembly
**
*Instance, name=NH-1, part=NH
*End Instance
**
*Nset, nset=Disps_Set, instance=NH-1
  12,  13,  15,  16, 119, 120
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*Elset, elset=Disps_Set, instance=NH-1
  142,  320,  338,  645,  931, 1239
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*Nset, nset=Fixed_Set, instance=NH-1
  10,  11,  14,  17,  99, 100
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*Elset, elset=Fixed_Set, instance=NH-1
   97,  213,  362,  734,  767,  789
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*End Assembly
*Amplitude, name=Amp-1, time=TOTAL TIME, definition=EQUALLY SPACED, fixed interval=0.1
             0.,              1.
**
** MATERIALS
**
*Material, name=NH
*Density
1060.,
*Hyperelastic, neo hooke
 3283.5, 6.131e-06
** ----------------------------------------------------------------
**
** STEP: Tension
**
*Step, name=Tension, nlgeom=YES
*Dynamic, Explicit
, 0.0002
*Bulk Viscosity
0.06, 1.2
**
** BOUNDARY CONDITIONS
**
** Name: Disps Type: Displacement/Rotation
*Boundary, amplitude=Amp-1
Disps_Set, 1, 1
Disps_Set, 2, 2
Disps_Set, 3, 3, 0.05
Disps_Set, 4, 4
Disps_Set, 5, 5
Disps_Set, 6, 6
** Name: Fixed Type: Displacement/Rotation
*Boundary
Fixed_Set, 1, 1
Fixed_Set, 2, 2
Fixed_Set, 3, 3
Fixed_Set, 4, 4
Fixed_Set, 5, 5
Fixed_Set, 6, 6
**
** OUTPUT REQUESTS
**
*Restart, write, number interval=1, time marks=NO
**
** FIELD OUTPUT: F-Output-1
**
*Output, field, variable=PRESELECT
**
** HISTORY OUTPUT: H-Output-1
**
*Output, history, variable=PRESELECT
*End Step
